<Lems>

    <!-- Specify which component to run -->
    <Target component="sim1"/>

    <!-- Include core NeuroML2 ComponentType definitions -->
    <Include file="Cells.xml"/>
    <Include file="Networks.xml"/>
    <Include file="Simulation.xml"/>

    <Include file="passiveCell.nml"/>

    <Simulation id="sim1" length="150ms" step="0.01ms" target="net1">

        <Display id="d1" title="Voltage" timeScale="1ms" xmin="0" xmax="150" ymin="-90" ymax="60">
            <Line id="v" quantity="pop0[0]/v" scale="1mV"  color="#000000" timeScale="1ms"/>
        </Display>

        <Display id="d3" title="Injected current" timeScale="1ms" xmin="0" xmax="150" ymin="-0.01" ymax=".11">
            <Line id="i" quantity="pop0[0]/pulseGen1/i" scale="1nA"  color="#000000" timeScale="1ms"/>
        </Display>

        <OutputFile id="of0" fileName="passive_v.dat">
            <OutputColumn id="v" quantity="pop0[0]/v"/>
        </OutputFile>

    </Simulation>

</Lems>
